# OpenSim document version 30000
MarkerSet:
  Marker STR: torso (0.1 0.22 0)
  Marker RA: torso (-0.03 0.42 0.15)
  Marker LA: torso (-0.03 0.42 -0.15)
  Marker C7: torso (-0.076 0.43 0)
  Marker T10: torso (-0.11 0.21 0)
  Marker SUP: torso (0.041 0.38 0)
  Marker RLHE: humerus_r (0.025 -0.27 0.038)
  Marker RMHE: humerus_r (0.001 -0.28 -0.045)
  Marker REJC: humerus_r (0.00584 -0.28069 -0.0002)
  Marker RUS: radius_r (-0.015 -0.23 -0.018)
  Marker RRS: radius_r (-0.003 -0.23 0.05)
  Marker RWJC: radius_r (-0.01 -0.23187 0.017)
  Marker RHMH5: hand_r (-0.0021 -0.068 -0.048)
  Marker RHMH2: hand_r (0.0025 -0.082 0.034)
  Marker LSJC: humerus_l (0 0 0)
  Marker LLHE: humerus_l (0.025 -0.27 -0.038)
  Marker LMHE: humerus_l (0.001 -0.28 0.045)
  Marker LEJC: humerus_l (0.00584 -0.28069 0.0002)
  Marker LUS: radius_l (-0.015 -0.23 0.018)
  Marker LRS: radius_l (-0.00316 -0.22312 -0.04988)
  Marker LWJC: radius_l (-0.01 -0.23187 -0.017)
  Marker LHMH2: hand_l (0.0025 -0.082 -0.034)
  Marker LHMH5: hand_l (-0.0021 -0.068 0.048)
  Marker RASIS: pelvis (0.02 0.015 0.128)
  Marker LASIS: pelvis (0.02 0.015 -0.128)
  Marker LPSIS: pelvis (-0.2 0.03 -0.04)
  Marker LHJC: pelvis (-0.0707 -0.0661 0.0835)
  Marker RHJC: pelvis (-0.0707 -0.0661 -0.0835)
  Marker RPSIS: pelvis (-0.2 0.03 0.04)
  Marker RLFE: femur_r (0 -0.39 0.05)
  Marker RMFE: femur_r (0 -0.39 -0.055)
  Marker RKJC: femur_r (0 -0.404 0)
  Marker RATT: tibia_r (0.058 -0.07 0.005)
  Marker RLM: tibia_r (-0.005 -0.42 0.055)
  Marker RSPH: tibia_r (0.006 -0.395 -0.045)
  Marker RAJC: tibia_r (0 -0.4 0)
  Marker RCAL: calcn_r (-0.015 0.02 0)
  Marker RMFH1: calcn_r (0.19 0.015 -0.043)
  Marker RMFH5: calcn_r (0.145 0.01 0.053)
  Marker RGT: femur_r (-0.042 0 0.1)
  Marker LGT: femur_l (-0.042 0 -0.1)
  Marker LLFE: femur_l (0 -0.39 -0.05)
  Marker LMFE: femur_l (0 -0.39 0.055)
  Marker LKJC: femur_l (0 -0.404 0)
  Marker LATT: tibia_l (0.058 -0.07 0.005)
  Marker LLM: tibia_l (-0.005 -0.42 -0.055)
  Marker LSPH: tibia_l (0.006 -0.395 0.045)
  Marker LAJC: tibia_l (0 -0.4 0)
  Marker LCAL: calcn_l (-0.015 0.02 0)
  Marker LMFH1: calcn_l (0.19 0.015 0.043)
  Marker LMFH5: calcn_l (0.145 0.01 -0.053)
  Marker RSJC: humerus_r (0 0 0)
  Marker SEL: head_and_neck (0.12 0.17 0.004)
  Marker OCC: head_and_neck (-0.1 0.14 0)
  Marker RTEMP: head_and_neck (0.02 0.15 0.1)
  Marker LTEMP: head_and_neck (0.02 0.15 -0.1)
  Marker RTT2: toes_r (0.06 0.012 0.012)
  Marker LTT2: toes_l (0.06 0.012 -0.012)
  Marker RFT3: fingers_r (0.03 -0.073 0)
  Marker LFT3: fingers_l (0.03 -0.073 0)
  Marker HV: head_and_neck (0 0.23 0)
